*Heading
** Job name: Job-1 Model name: Model-1
** Generated by: Abaqus/CAE 2021
*Preprint, echo=NO, model=NO, history=NO, contact=NO
**
** PARTS
**
*Part, name=Part-1
*Node
      1,           1.,           1.,           1.
      2,           1.,           0.,           1.
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*Element, type=C3D4
   1,  603,  604,  605,  606
   2,  603,  607,  608,  609
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*Nset, nset=Set-1, generate
    1,  1462,     1
*Elset, elset=Set-1, generate
    1,  6829,     1
** Section: Section-1
*Solid Section, elset=Set-1, controls=EC-1, material=Material-1
,
*End Part
**
**
** ASSEMBLY
**
*Assembly, name=Assembly
**
*Instance, name=Part-1-1, part=Part-1
*End Instance
**
*Nset, nset=Set-1, instance=Part-1-1
   1,   2,   5,   8,   9,  10
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*Elset, elset=Set-1, instance=Part-1-1
  226,  881, 1151, 1154, 1396, 1546
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*Nset, nset=Set-2, instance=Part-1-1
   3,   4,   6,   7,  27,  28
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*Elset, elset=Set-2, instance=Part-1-1
  261,  374,  375,  587,  682,  924
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*Nset, nset=Set-3, instance=Part-1-1
   5,   6,   7,   8,  54,  55
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*Elset, elset=Set-3, instance=Part-1-1
   21,   62,   77,  321,  345,  358
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*Nset, nset=Set-4, instance=Part-1-1
   1,   2,   3,   4,   9,  10
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*Elset, elset=Set-4, instance=Part-1-1
  183,  338,  417,  427,  489,  614
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*Nset, nset=Set-5, instance=Part-1-1
   1,   2,   5,   8,   9,  10
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*Elset, elset=Set-5, instance=Part-1-1
  226,  881, 1151, 1154, 1396, 1546
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*Nset, nset=Set-6, instance=Part-1-1
   3,   4,   6,   7,  27,  28
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*Elset, elset=Set-6, instance=Part-1-1
  261,  374,  375,  587,  682,  924
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*End Assembly
**
** ELEMENT CONTROLS
**
*Section Controls, name=EC-1
1., 1., 1., 0., 0.
**
** MATERIALS
**
*Material, name=Material-1
*Density
1.,
*Elastic
210., 0.3
*Plastic
 0.24,0.
** ----------------------------------------------------------------
**
** STEP: Step-1
**
*Step, name=Step-1, nlgeom=NO
*Dynamic, Explicit, direct user control
0.0005, 0.5
*Bulk Viscosity
0., 0.
** Mass Scaling: Disable Throughout Step
*Variable Mass Scaling
**
** BOUNDARY CONDITIONS
**
** Name: BC-1 Type: Displacement/Rotation
*Boundary
Set-5, 1, 1
Set-5, 2, 2
Set-5, 3, 3
Set-5, 4, 4
Set-5, 5, 5
Set-5, 6, 6
** Name: BC-2 Type: Velocity/Angular velocity
*Boundary, type=VELOCITY
Set-6, 3, 3, -1.
**
** OUTPUT REQUESTS
**
*Restart, write, number interval=1, time marks=NO
**
** FIELD OUTPUT: F-Output-1
**
*Output, field, variable=PRESELECT
**
** HISTORY OUTPUT: H-Output-1
**
*Output, history, variable=PRESELECT
*End Step
