*Heading
** Job name: Job-1 Model name: Model-1
** Generated by: Abaqus/CAE 2024
*Preprint, echo=NO, model=NO, history=NO, contact=NO
**
** PARTS
**
*Part, name=Part-1
*Node
      1,           1.,           1.,           1.
      2,           1.,           0.,           1.
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*Element, type=C3D4
   1, 387, 388, 389, 390
   2, 388, 391, 389, 390
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*Nset, nset=Set-1, generate
   1,  832,    1
*Elset, elset=Set-1, generate
    1,  3711,     1
** Section: Section-1
*Solid Section, elset=Set-1, controls=EC-1, material=Material-1
,
*End Part
**
**
** ASSEMBLY
**
*Assembly, name=Assembly
**
*Instance, name=Part-1-1, part=Part-1
*End Instance
**
*Nset, nset=Set-1, instance=Part-1-1
   3,   4,   6,   7,  23,  24
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*Elset, elset=Set-1, instance=Part-1-1
    9,   96,  262,  354,  363,  376
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*Nset, nset=Set-2, instance=Part-1-1
   1,   2,   5,   8,   9,  10
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*Elset, elset=Set-2, instance=Part-1-1
  214,  222,  531,  604,  617,  673
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*Nset, nset=Set-3, instance=Part-1-1
   3,   4,   6,   7,  23,  24
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*Elset, elset=Set-3, instance=Part-1-1
    9,   96,  262,  354,  363,  376
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*End Assembly
**
** ELEMENT CONTROLS
**
*Section Controls, name=EC-1
1., 1., 1., 0., 0.
**
** MATERIALS
**
*Material, name=Material-1
*Density
1.,
*Elastic
21000., 0.3
** ----------------------------------------------------------------
**
** STEP: Step-1
**
*Step, name=Step-1, nlgeom=NO, perturbation
*Frequency, eigensolver=Lanczos, sim, acoustic coupling=on, normalization=mass
10, , , , ,
**
** BOUNDARY CONDITIONS
**
** Name: BC-1 Type: Displacement/Rotation
*Boundary
Set-3, 1, 1
Set-3, 2, 2
Set-3, 3, 3
Set-3, 4, 4
Set-3, 5, 5
Set-3, 6, 6
**
** OUTPUT REQUESTS
**
*Restart, write, frequency=0
**
** FIELD OUTPUT: F-Output-1
**
*Output, field
*Node Output
U,
**
** HISTORY OUTPUT: H-Output-1
**
*Output, history
*Energy Output
ALLKE, ALLSE
*End Step
