*NODE
1, 0, 0, 5
2, 0, 0, 0
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******* E L E M E N T S *************
*ELEMENT, type=C3D8, ELSET=domain
757, 116, 642, 804, 644, 645, 805, 808, 806
758, 642, 340, 643, 804, 805, 371, 807, 808
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*ELSET,ELSET=neumann
121, 122, 123, 124, 125, 126
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*ELSET,ELSET=dirichlet
673, 674, 675, 676, 677, 678
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*ELSET,ELSET=domain
757, 758, 759, 760, 761, 762
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*NSET,NSET=neumann
1, 2, 3, 4, 5, 6
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*NSET,NSET=dirichlet
2, 4, 6, 8, 50, 51
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*NSET,NSET=domain
1, 2, 3, 4, 5, 6
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*MATERIAL, NAME=Aluminium
*ELASTIC
70000.0, 0.34
*DENSITY
2.7e-09
*SOLID SECTION, ELSET=domain,MATERIAL=Aluminium
1
*boundary
dirichlet,1,6
*STEP
*frequency
12
*NODE FILE
U
*END STEP
